*Heading
3x3x1 sheet-Diamond lattice-skin plate under eps11 tension
** Generated by generate_diamond_tension_twist_inp.py
*Preprint, echo=NO, model=NO, history=NO, contact=NO
*Part, name=DIAMOND_LPS
*Node
1, 0.00000000, 0.00000000, -2.91666667
2, 0.41666667, 0.00000000, -2.91666667
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*Element, type=C3D4, elset=SOLID
1, 1, 2, 3, 7
2, 1, 3, 4, 7
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*Nset, nset=XMIN
1, 4, 5, 8, 9, 12
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*Nset, nset=XMAX
49659, 49660, 49661, 49662, 49663, 49664
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*Nset, nset=ANCHOR_YZ
1841
*Nset, nset=ANCHOR_Z
1032
*Solid Section, elset=SOLID, material=BASE
,
*End Part
*Assembly, name=ASSEMBLY
*Instance, name=DIAMOND_LPS-1, part=DIAMOND_LPS
*End Instance
*End Assembly
*Material, name=BASE
*Elastic
1215, 0.35
*Step, name=EPS11_TENSION, nlgeom=NO
*Static
0.1, 1.0, 1e-05, 0.1
*Boundary
ASSEMBLY.DIAMOND_LPS-1.XMIN, 1, 1, 0.0
ASSEMBLY.DIAMOND_LPS-1.XMAX, 1, 1, 0.3
ASSEMBLY.DIAMOND_LPS-1.ANCHOR_YZ, 2, 3, 0.0
ASSEMBLY.DIAMOND_LPS-1.ANCHOR_Z, 3, 3, 0.0
*Output, field, frequency=1
*Node Output
U
*Element Output, directions=YES
S, E, SENER
*Output, history, frequency=1
*Node Output, nset=ASSEMBLY.DIAMOND_LPS-1.XMAX
U1, RF1
*End Step
